// Net load at substation
//object recorder {
//parent network_node;
//property distribution_load;
//interval 300;
//file ./output/distribution_load123.csv;
//}
object recorder{
name climate_recorder1;
parent Des_Moines_Intl_AP;
property temperature, solar_flux, humidity, wind_speed;
interval 1;
file ./output/climateprofile.csv;
}
